// SBML level 2 version 4

model MB_RhoGTP_GEF_act()

  // Compartments:
  compartment default = 1 volume;

  // Species:
  substanceOnly species GEF in default = 0;
  species Degrade in default = 0;
  substanceOnly species Activator in default = 1;
  species Active_GEF in default = 0;

  // Reactions:
  re1: GEF => Active_GEF; Activator*GEF*k1;  // modifiers: Activator
    k1 = 1 substance;
  re2: Active_GEF => GEF; Active_GEF*k2;
    k2 = 0.1 substance;
  re3: Activator => Degrade; Activator*k3;
    k3 = 0.5 substance;

  // Unit definitions:
  unit substance = mole;
  unit volume = litre;
  unit area = metre^2;
  unit length = metre;
  unit time = second;
end
