// SBML level 2 version 4

model MB_RhoGTP_GDI_activity()

  // Compartments:
  compartment default = 1 volume;

  // Species:
  substanceOnly species Effector in default = 0;
  substanceOnly species GDI in default = 0;
  species GTP_Rho in default = 0; GTP_Rho is "GTP-Rho";
  species GDP_Rho in default = 0; GDP_Rho is "GDP-Rho";
  substanceOnly species GAP in default = 0;
  species GDI_GTP_Rho in default = 0; GDI_GTP_Rho is "GDI·GTP-Rho";
  species Effector_GTP_Rho in default = 0; Effector_GTP_Rho is "Effector·GTP-Rho";
  substanceOnly species GDI_GDP_Rho in default = 0; GDI_GDP_Rho is "GDI·GDP-Rho";
  species Active_GEF in default = 0;

  // Reactions:
  re4: GDP_Rho => GTP_Rho; kcatGEF*GDP_Rho*Active_GEF/(KmGEFRho + GDP_Rho);  // modifiers: Active_GEF
    kcatGEF = 5.64 substance; KmGEFRho = 24.5 substance;
  re5: GTP_Rho => GDP_Rho; kcatGAP*GTP_Rho*GAP/(KmGAPRho + GTP_Rho);  // modifiers: GAP
    kcatGAP = 95.9 substance; KmGAPRho = 4.48 substance;
  re6: GDP_Rho + GDI -> GDI_GDP_Rho; k4*GDP_Rho*GDI - k5*GDI_GDP_Rho;
    k4 = 0.5 substance; k5 = 0.05 substance;
  re7: GDI + GTP_Rho -> GDI_GTP_Rho; k6*GTP_Rho*GDI - k7*GDI_GTP_Rho;
    k6 = 0.5 substance; k7 = 0.05 substance;
  re8: GTP_Rho + Effector -> Effector_GTP_Rho; k8*GTP_Rho*Effector - k9*Effector_GTP_Rho;
    k8 = 28.2 substance; k9 = 0.18 substance;

  // Unit definitions:
  unit substance = mole;
  unit volume = litre;
  unit area = metre^2;
  unit length = metre;
  unit time = second;
end
