// SBML level 2 version 4

model untitled()

  // Compartments:
  compartment default = 1 volume;

  // Species:
  species Active_GEF in default = 0;
  species GDP_Rho in default = 0; GDP_Rho is "GDP-Rho";
  species GTP_Rho in default = 0; GTP_Rho is "GTP-Rho";
  substanceOnly species GDI in default = 0.7;
  substanceOnly species GAP in default = 0.1;
  substanceOnly species Effector in default = 1;
  species Effector_GTP_Rho in default = 0; Effector_GTP_Rho is "Effector·GTP-Rho";

  // Reactions:
  re4: GDP_Rho => GTP_Rho; kcatGEF*GDP_Rho*Active_GEF/(KmGEFRho + GDP_Rho);  // modifiers: Active_GEF, GDI
    kcatGEF = 5.64 substance; KmGEFRho = 24.5 substance;
  re5: GTP_Rho => GDP_Rho; kcatGAP*GTP_Rho*GAP/(KmGAPRho + GTP_Rho);  // modifiers: GAP, GDI
    kcatGAP = 95.9 substance; KmGAPRho = 4.48 substance;
  re8: GTP_Rho + Effector -> Effector_GTP_Rho; k8*GTP_Rho*Effector - k9*Effector_GTP_Rho;
    k8 = 28.2 substance; k9 = 0.18 substance;

  // Unit definitions:
  unit substance = mole;
  unit volume = litre;
  unit area = metre^2;
  unit length = metre;
  unit time = second;
end
