// SBML level 2 version 4

model MB_RhoGTP_GDI_activity()

  // Compartments:
  compartment default = 1 volume;

  // Species:
  substanceOnly species GDI in default = 0;
  species GTP_Rho in default = 0; GTP_Rho is "GTP-Rho";
  species GDP_Rho in default = 0; GDP_Rho is "GDP-Rho";
  species GDI_GTP_Rho in default = 0; GDI_GTP_Rho is "GDI·GTP-Rho";
  substanceOnly species GDI_GDP_Rho in default = 0; GDI_GDP_Rho is "GDI·GDP-Rho";

  // Reactions:
  re6: GDP_Rho + GDI -> GDI_GDP_Rho; k4*GDP_Rho*GDI - k5*GDI_GDP_Rho;
    k4 = 0.5 substance; k5 = 0.05 substance;
  re7: GDI + GTP_Rho -> GDI_GTP_Rho; k6*GTP_Rho*GDI - k7*GDI_GTP_Rho;
    k6 = 0.5 substance; k7 = 0.05 substance;

  // Unit definitions:
  unit substance = mole;
  unit volume = litre;
  unit area = metre^2;
  unit length = metre;
  unit time = second;
end
