// SBML level 2 version 4

model untitled()

  // Compartments:
  compartment default = 1 volume;

  // Species:
  substanceOnly species Activator in default = 1;
  species Degrade in default = 0;
  substanceOnly species GEF in default = 0.31;
  species Active_GEF in default = 0;
  species GDP_Rho in default = 0; GDP_Rho is "GDP-Rho";
  species GTP_Rho in default = 0; GTP_Rho is "GTP-Rho";
  substanceOnly species GDI in default = 0.7;
  substanceOnly species GAP in default = 0.1;
  substanceOnly species Effector in default = 1;
  substanceOnly species GDI_GDP_Rho in default = 1.3; GDI_GDP_Rho is "GDI·GDP-Rho";
  species GDI_GTP_Rho in default = 0; GDI_GTP_Rho is "GDI·GTP-Rho";
  species Effector_GTP_Rho in default = 0; Effector_GTP_Rho is "Effector·GTP-Rho";

  // Reactions:
  re1: GEF => Active_GEF; Activator*GEF*k1;  // modifiers: Activator
    k1 = 1 substance;
  re2: Active_GEF => GEF; Active_GEF*k2;
    k2 = 0.1 substance;
  re3: Activator => Degrade; Activator*k3;
    k3 = 0.5 substance;
  re4: GDP_Rho => GTP_Rho; kcatGEF*GDP_Rho*Active_GEF/(KmGEFRho + GDP_Rho);  // modifiers: Active_GEF, GDI
    kcatGEF = 5.64 substance; KmGEFRho = 24.5 substance;
  re5: GTP_Rho => GDP_Rho; kcatGAP*GTP_Rho*GAP/(KmGAPRho + GTP_Rho);  // modifiers: GAP, GDI
    kcatGAP = 95.9 substance; KmGAPRho = 4.48 substance;
  re6: GDP_Rho + GDI -> GDI_GDP_Rho; k4*GDP_Rho*GDI - k5*GDI_GDP_Rho;
    k4 = 0.5 substance; k5 = 0.05 substance;
  re7: GDI + GTP_Rho -> GDI_GTP_Rho; k6*GTP_Rho*GDI - k7*GDI_GTP_Rho;
    k6 = 0.5 substance; k7 = 0.05 substance;
  re8: GTP_Rho + Effector -> Effector_GTP_Rho; k8*GTP_Rho*Effector - k9*Effector_GTP_Rho;
    k8 = 28.2 substance; k9 = 0.18 substance;

  // Unit definitions:
  unit substance = mole;
  unit volume = litre;
  unit area = metre^2;
  unit length = metre;
  unit time = second;
end
