// SBML level 3 version 1

model Tyson_2003_1a_Linear()
  // model units - substance: molecules, time: s, volume: um3, area: um2, length: um

  // Compartments:
  compartment c0 = 50000 um3;

  // Species:
  species R in c0 = 0;
  species S in c0 = time;

  // Parameters:
  kd_r0 = 5 s_1;
  Kf_r0 has s_1;
  k_r1 = 1 s_1;

  // Assignment rules:
  Kf_r0 := kd_r0;

  // Reactions:
  r0: R -> ; Kf_r0*R*c0;
    Kr = 0 uM_s_1;
  r1: -> R; k_r1*S*c0;  // modifiers: S

  // Unit definitions:
  unit molecules = item;
  unit um3 = (1e-6 meter)^3;
  unit um2 = (1e-6 meter)^2;
  unit um = 1e-6 meter;
  unit s = second;
  unit uM_s_1 = 1e-6 mole / (litre * second);
  unit s_1 = 1 / second;
end
